!--------------------------------------------------
! mltplxyz60.inp
! by Toshi-Taka Ikeshoji
!
! 溶融池の大きさの概略を得る
!--------------------------------------------------
! 2017/05/01  作成
! 2017/05/15  修正
! 2017/05/26  修正
! 2017/06/02  mltplxyz44.inpからmltplxyz50.inp
! 2017/06/07  JOBNAMEの取り込み
! 2018/12/21  パウダーベッド部分除外 ESEL,R,LOC,Z,-h1,-h2
!--------------------------------------------------
!
*GET,fnmlt,ACTIVE,,JOBNAM
/POST1
!
FILE,fnmlt,'rth,'.'
!
CSYS,0
!
SET,LAST
*GET,stpnum,ACTIVE,0,SOLU,NCMLS
nstep=420 ! データ計算間隔
n0=400
*IF,(stpnum-(n0+1)+1),LT,nstep,:term00

NSIZE_=((stpnum-(n0+1)+1)/nstep)-MOD((stpnum-(n0+1)+1)/nstep,1)+1
*DIM,tim ,,NSIZE_
*DIM,nstp,,NSIZE_
*DIM,dms ,,NSIZE_,9 ! Col 1:xmin, 2:xmax, 3:ymin, 4:ymax, 5:zmin, 6:zmax
                    !     7:xmax-xmin, 8:ymax-ymin, 9:zmax-zmin
*DIM,dmsi,,NSIZE_,6 ! 最大値，最小値をとる要素番号
                    ! Col 1:xmin, 2:xmax, 3:ymin, 4:ymax, 5:zmin, 6:zmax
*DIM,dmsc,,NSIZE_,9 ! 最大値，最小値をとる要素番号の要素の中心座標
                    ! Col 1:xmin, 2:xmax, 3:ymin, 4:ymax, 5:zmin, 6:zmax
                    !     7:xmax-xmin, 8:ymax-ymin, 9:zmax-zmin
!
! ect : 要素数(Count of Elements)
ALLSEL
*GET,ectall,ELEM,,COUNT
*DIM,elnum,,ectall   ! 要素番号格納配列
*DIM,elmsk,,ectall ! mask
*DIM,eldms,,ectall,6 ! Col 1:xmin, 2:xmax, 3:ymin, 4:ymax, 5:zmin, 6:zmax
*DIM,elbuf,,ectall,1 ! eldmsのバッファ

! 要素番号の格納
*DIM,nds,,20  ! 要素内節点．最大20節点を想定
*DIM,tmsk,,20*(20-1)/2   ! mask
*DIM,tdms,,20*(20-1)/2,3 ! Col 1:x, 2:y, 3:z
! 便利文字列
*DIM,dd,char,3
dd(1) = 'x','y','z'

idx=0
*DO,istp,n0+1,stpnum,nstep
  idx=idx+1
  SET,istp,LAST,1,
  *GET,tim_,ACTIVE,0,SET,TIME
  nstp(idx)=istp
  tim(idx)=tim_
  *status,istp
  *status,tim_
  !
  ! 液相線温度（融点）を含む要素を選択（溶融池境界面）
  ESEL,ALL
  ESEL,S,TYPE,,1
  ESEL,R,CENT,Z,-h1,-h2
  NSEL,ALL
  NSEL,S,TEMP,,liquidus,,
  ESLN,R,0,ACTIVE
  ESLN,U,1,ACTIVE
  *GET,ect,ELEM,,COUNT  ! ect: 溶融池境界面要素数
  *STATUS,ect

  *IF,ect,LT,1,*CYCLE ! 溶融池界面を含む要素が無い場合はDOループの最後へ

  *VGET,elnum,ELEM,,ELIST

  *VFILL,elmsk,RAMP,0,0

  *DO,ie,1,ect,
    ESEL,S,ELEM,,elnum(ie)
    NSLE,S,ACTIVE
    *GET,nct,NODE,,COUNT    ! SOLID70ならnct = 8
    *VGET,nds,NODE,,NLIST    ! 要素内の節点番号格納
    ! 要素内の液相線位置(x,y,z）の最大値，最小値の取得
    *VFILL,tmsk,RAMP,0,0
    *DO,ii,1,3
      *VFILL,tdms(1,ii),RAMP,0,0
    *ENDDO
    kct=0 ! tmsk,dmsの（有効な）要素数を数えるカウンタ
    *DO,k1,1,nct  ! 節点総当たり
      x1=NX(nds(k1))
      y1=NY(nds(k1))
      z1=NZ(nds(k1))
      t1=TEMP(nds(k1))
      *DO,k2,k1+1,nct
        kct=kct+1
        t2=TEMP(nds(k2))
        *IF,t1,NE,t2,THEN
          t2lqd=(t2-liquidus)/(t2-t1)
          lqdt1=(liquidus-t1)/(t2-t1)
          tmsk(kct)=(t2lqd*lqdt1/ABS(t2lqd*lqdt1))>0
          tdms(kct,1)=t2lqd*x1+lqdt1*NX(nds(k2))
          tdms(kct,2)=t2lqd*y1+lqdt1*NY(nds(k2))
          tdms(kct,3)=t2lqd*z1+lqdt1*NZ(nds(k2))
        *ELSE
          tmsk(kct)=0
        *ENDIF
      *ENDDO
    *ENDDO

    *DO,ii,1,3
      *VMASK,tmsk
      *VSCFUN,buf,MIN,tdms(1,ii)
      eldms(ie,2*ii-1)=buf
      *VMASK,tmsk
      *VSCFUN,buf,MAX,tdms(1,ii)
      eldms(ie,2*ii)=buf
    *ENDDO
    elmsk(ie)=1
  *ENDDO

  *DO,ii,1,3
    ! 最小値
    *VMASK,elmsk
    *VSCFUN,buf,MIN,eldms(1,2*ii-1)
    dms(idx,2*ii-1)=buf
    ! 最小値の要素番号と要素中心座標
    *VMASK,elmsk
    *VOPER,elbuf(1),eldms(1,2*ii-1),EQ,buf
    *VSCFUN,buf,FIRST,elbuf(1)
    dmsi(idx,2*ii-1)=buf
    *VGET,dmsc(idx,2*ii-1),ELEM,buf,CENT,%dd(ii)%
    ! 最大値
    *VMASK,elmsk
    *VSCFUN,buf,MAX,eldms(1,2*ii)
    dms(idx,2*ii)=buf
    ! 最大値の要素番号と要素中心座標
    *VMASK,elmsk
    *VOPER,elbuf(1),eldms(1,2*ii),EQ,buf
    *VSCFUN,buf,LAST,elbuf(1)
    dmsi(idx,2*ii)=buf
    *VGET,dmsc(idx,2*ii),ELEM,buf,CENT,%dd(ii)%
    ! 最大値 - 最小値
    dms(idx,ii+6)=dms(idx,2*ii)-dms(idx,2*ii-1)
    dmsc(idx,ii+6)=dmsc(idx,2*ii)-dmsc(idx,2*ii-1)
  *ENDDO

  !*IF,istp,EQ,101,THEN
  !  *CFOPEN,'tmp','mlt'
  !  *VWRITE
  !  ('Step ','element count')
  !  *VWRITE,istp,ect
  !  (F5.0,F13.0)
  !  *VWRITE
  !  ('          ','time         ',' x min       ',' x max       ',' y min       ',' y max       ',' z min       ',' z max       ',' dx          ',' dy          ',' dz          ')
  !  *VWRITE,sequ,tim(idx),dms(idx,1),dms(idx,2),dms(idx,3),dms(idx,4),dms(idx,5),dms(idx,6),dms(idx,7),dms(idx,8),dms(idx,9)
  !  (F10.0,E13.5,9E13.5)
  !  *VWRITE
  !  ('Step ','mask ','element #    ',' x min       ',' x max       ',' y min       ',' y max       ',' z min       ',' z max       ')
  !  *VMASK,elmsk
  !  *VWRITE,sequ,elmsk(1),elnum(1),eldms(1,1),eldms(1,2),eldms(1,3),eldms(1,4),eldms(1,5),eldms(1,6)
  !  (F5.0,F5.0,F13.0,6E13.5)
  !  *CFCLOS
  !*ENDIF

*ENDDO

! 単位変換
*VOPER,tim(1),tim(1),MULTI,1.0E+3,,  ! s >> ms
*DO,ii,1,9
    *VOPER,dms(1,ii),dms(1,ii),MULTI,1.0E+6,, ! m >> um
*ENDDO
*DO,ii,1,9
    *VOPER,dmsc(1,ii),dmsc(1,ii),MULTI,1.0E+6,, ! m >> um
*ENDDO

*CFOPEN,%fnmlt%-sb,'mlt'
*VWRITE
('Step ',' time, ms    ',' x min, um   ',' x max, um   ',' y min, um   ',' y max, um   ',' z min, um   ',' z max, um   ',' width, um   ',' length, um  ',' depth, um   ')
*VWRITE,nstp(1),tim(1),dms(1,1),dms(1,2),dms(1,3),dms(1,4),dms(1,5),dms(1,6),dms(1,7),dms(1,8),dms(1,9)
(F5.0,E13.5,9E13.5)
*CFCLOS

*CFOPEN,%fnmlt%-sb,'mli'
*VWRITE
('Step ',' time, ms    ','x min ','x max ','y min ','y max ','z min ','z max ')
*VWRITE,nstp(1),tim(1),dmsi(1,1),dmsi(1,2),dmsi(1,3),dmsi(1,4),dmsi(1,5),dmsi(1,6)
(F5.0,E13.5,6F6.0)
*CFCLOS

*CFOPEN,%fnmlt%-sb,'mle'
*VWRITE
('Step ',' time, ms    ',' x min, um   ',' x max, um   ',' y min, um   ',' y max, um   ',' z min, um   ',' z max, um   ',' width, um   ',' length, um  ',' depth, um   ')
*VWRITE,nstp(1),tim(1),dmsc(1,1),dmsc(1,2),dmsc(1,3),dmsc(1,4),dmsc(1,5),dmsc(1,6),dmsc(1,7),dmsc(1,8),dmsc(1,9)
(F5.0,E13.5,9E13.5)
*CFCLOS

buf=
x1=
x2=
y1=
y2=
z1=
z2=
t1=
t2=
:term00
*DEL,tim
*DEL,nstp
*DEL,dms
*DEL,dmsi
*DEL,dmsc
*DEL,elnum
*DEL,elmsk
*DEL,eldms
*DEL,nds
*DEL,tmsk
*DEL,tdms
*DEL,dd
!
FINISH
! Module END
